OpenVSP model (file version 5), 11 components.
Geometry view with OpenVSP parameter names; values to 6 digits, angles in degrees, lengths in the model's unit.
Overall bounding box: X_Min=0 X_Len=66.8582 Y_Min=-32.3966 Y_Len=65.1632 Z_Min=-2.97826 Z_Len=18.2241

Fuselage "FuselageGeom"
  location (X Y Z) 0 0.543478 0, rotation 0 0 0
  bounding box size 63.6995 6.61162 8.31154
  Design: Length=63.6818
  cross sections:
    n  XLocPercent  YLocPercent  YRotate   ZLocPercent  shape
    0  0            0            0         0.00510375   point
    1  0.2          0            0         0            ellipse Ellipse_Height=4 Ellipse_Width=4
    2  0.5          0            0         0            as above
    3  0.75         0            0         0            as above
    4  1            0.00543478   -2.96703  0.0784644    circle Circle_Diameter=0.681818

Fuselage "FuselageGeom"
  location (X Y Z) 1.67377 0.652174 5.03878, rotation 0 0 0
  bounding box size 62.5 8.8 10.4297
  Design: Length=62.5
  cross sections:
    n  XLocPercent  YLocPercent  ZLocPercent  shape
    0  0            -0.0015      -0.0582218   point
    1  0.25         0            0            ellipse Ellipse_Height=7.7 Ellipse_Width=8.8
    2  0.5          0            0            as above
    3  0.730978     0            0            as above
    4  1            0            0            point

Wing "Vertical_StabilizergGeom"
  location (X Y Z) 52.6622 0.594595 5.45946, rotation 90 0 -10
  bounding box size 14.1961 1.0293 11.573
  totals: TotalSpan=11.6629 TotalProjectedSpan=11.6629 TotalChord=7.07371 TotalArea=75 TotalAR=1.81364
  root: chord 10.289, twist 0, NACA 4-series Camber=0 CamberLoc=0.2 ThickChord=0.1
  sections:
    n  Span     Root_Chord  Tip_Chord  Area     Sweep  Sweep_Location  Dihedral  Twist  Twist_Location  tip airfoil
    1  2.91572  10.289      8.35984    27.1875  40     0               0         0      0.25            as above
    2  2.91572  8.35984     6.43065    21.5625  40     0               0         0      0.25            as above
    3  5.83145  6.43065     2.57226    26.25    40     0               0         0      0.25            as above

Wing "Horizontal_Stabilizer"
  location (X Y Z) 49.6159 2.83353 3.42029, rotation 0 0 0
  symmetric about XZ
  bounding box size 8.51268 24.9571 0.458494
  totals: TotalSpan=19.29 TotalProjectedSpan=19.29 TotalChord=3.62327 TotalArea=69.8928 TotalAR=5.32392
  root: chord 4.58316, twist 0, NACA 4-series Camber=0 CamberLoc=0.2 ThickChord=0.1
  sections:
    n  Span    Root_Chord  Tip_Chord  Area     Sweep  Sweep_Location  Dihedral  Twist  Twist_Location  tip airfoil
    1  4.8225  4.58316     3.88206    20.4118  34.34  0               0         0      0.25            as above
    2  4.8225  3.88206     2.14579    14.5347  32.5   0               0         0      0.25            as above

Wing "Taillets_1", child of "Horizontal_Stabilizer"
  location (X Y Z) 59.6356 12.3289 5.82252, rotation 90 0.182591 -179.949; relative location -2.40223 10.0196 -9.49539, rotation -0.182591 0 -89.9489
  symmetric about XY
  bounding box size 2.46155 0.230663 3.0022
  totals: TotalSpan=6 TotalProjectedSpan=6 TotalChord=2.3 TotalArea=13.8 TotalAR=2.6087
  root: chord 2.3, twist 0, NACA 4-series Camber=0 CamberLoc=0.2 DeltaX=0.681659 ThickChord=0.1
  sections:
    n  Span  Root_Chord  Tip_Chord  Area  Sweep  Sweep_Location  Dihedral  Twist  Twist_Location  tip airfoil
    1  3     2.3         2.3        6.9   30     0               0         0      0.25            NACA 4-series Camber=0 CamberLoc=0.2 ThickChord=0.1

Wing "Taillets_1", child of "Horizontal_Stabilizer"
  location (X Y Z) 55.5663 -12.6531 5.97688, rotation -90 0 0
  bounding box size 2.47967 0.238781 2.4974
  totals: TotalSpan=2.4974 TotalProjectedSpan=2.4974 TotalChord=2.65594 TotalArea=6.63294 TotalAR=0.940305
  root: chord 2.925, twist 0, NACA 4-series Camber=0 CamberLoc=0.2 Scale=0.794979 ThickChord=0.1
  sections:
    n  Span    Root_Chord  Tip_Chord  Area     Sweep  Sweep_Location  Dihedral  Twist  Twist_Location  tip airfoil
    1  2.4974  2.925       2.38689    6.63294  30     0               0         0      0.25            NACA 4-series Camber=0 CamberLoc=0.2 DeltaX=-0.66875 ThickChord=0.1

Wing "WingGeom"
  location (X Y Z) 21 0 0, rotation 0 0 0
  symmetric about XZ
  bounding box size 23.1783 60.0705 3.27213
  totals: TotalSpan=60.3 TotalProjectedSpan=60.0705 TotalChord=6.45342 TotalArea=389.141 TotalAR=9.27291
  root: chord 10.3255, twist 0, NACA 4-series Camber=0 CamberLoc=0.2 ThickChord=0.1
  sections:
    n  Span   Root_Chord  Tip_Chord  Area     Sweep  Sweep_Location  Dihedral  Twist    Twist_Location  tip airfoil
    1  30.15  10.3255     2.58137    194.571  34.34  0               5         1.66667  0.25            as above

Stack "StackGeom"
  location (X Y Z) 22.2826 -10 -0.869565, rotation 0 0 0
  bounding box size 8.05164 4 4
  cross sections:
    n  XDelta   YDelta  ZDelta  shape
    0  0        0       0       point
    1  1        0       0       ellipse Ellipse_Height=4 Ellipse_Width=4
    2  2.57377  0       0       as above
    3  3.95082  0       0       ellipse Ellipse_Height=2.5 Ellipse_Width=3
    4  0.5      0       0       point

Stack "StackGeom"
  location (X Y Z) 22.9891 11 -0.978261, rotation 0 0 0
  bounding box size 8.05164 4 4
  cross sections:
    n  XDelta   YDelta  ZDelta  shape
    0  0        0       0       point
    1  1        0       0       ellipse Ellipse_Height=4 Ellipse_Width=4
    2  2.57377  0       0       as above
    3  3.95082  0       0       ellipse Ellipse_Height=2.5 Ellipse_Width=3
    4  0.5      0       0       point

Wing "WingGeom"
  location (X Y Z) 41.087 -30.2 2.60909, rotation 90 0 0
  bounding box size 3.22607 2.358 2.56977
  totals: TotalSpan=3.3546 TotalProjectedSpan=2.56977 TotalChord=2.0163 TotalArea=6.76386 TotalAR=0.976324
  root: chord 3.22607, twist 0, NACA 4-series Camber=0 CamberLoc=0.2 ThickChord=0.1
  sections:
    n  Span    Root_Chord  Tip_Chord  Area     Sweep  Sweep_Location  Dihedral  Twist  Twist_Location  tip airfoil
    1  3.3546  3.22607     0.806518   6.76386  30     0               40        0      0.25            as above

Wing "WingGeom"
  location (X Y Z) 41.25 29.3478 2.28261, rotation 0 0 0
  bounding box size 3.28703 3.41872 3.04632
  totals: TotalSpan=4.46283 TotalProjectedSpan=3.41872 TotalChord=1.77605 TotalArea=7.9262 TotalAR=1.47456
  root: chord 2.84168, twist 0, NACA 4-series Camber=0 CamberLoc=0.2 ThickChord=0.1
  sections:
    n  Span     Root_Chord  Tip_Chord  Area    Sweep  Sweep_Location  Dihedral  Twist  Twist_Location  tip airfoil
    1  4.46283  2.84168     0.710419   7.9262  30     0               40        0      0.25            as above
