OpenVSP model (file version 4), 7 components.
Geometry view with OpenVSP parameter names; values to 6 digits, angles in degrees, lengths in the model's unit.
Overall bounding box: X_Min=0 X_Len=16.8185 Y_Min=-8.47265 Y_Len=16.9453 Z_Min=-0.654256 Z_Len=4.47467

Fuselage "Fuselage"
  location (X Y Z) 0 0 0, rotation 0 0 0
  bounding box size 15.1864 1.93221 1.92372
  Design: Length=15.1
  cross sections:
    n  XLocPercent  YLocPercent  YRotate  ZLocPercent  shape
    0  0            0            0        0            point
    1  0.115489     0            0        0.0198675    general fuselage BotStr=0.83 BotTanAngle=90 CornerRad=0 Height=1.15 LowStr=0.83 MaxWidthLoc=0 TopStr=0.83 TopTanAngle=90 UpStr=0.83 Width=1.6
    2  0.25         0            0        0.0423841    general fuselage BotStr=0.83 BotTanAngle=90 CornerRad=0 Height=1.8 LowStr=0.83 MaxWidthLoc=0 TopStr=0.83 TopTanAngle=90 UpStr=0.83 Width=1.9
    3  0.55         0            0        0.0430464    as above
    4  0.682065     0            0        0.0423841    as above
    5  1            0            25       0.0679868    circle Circle_Diameter=0.4
    6  1            0            0        0.0679868    point

Wing "Wing", child of "Fuselage"
  location (X Y Z) 6.07 0 -0.381304, rotation 5 0 0
  symmetric about XZ
  bounding box size 3.57304 16.9453 0.92422
  totals: TotalSpan=17 TotalProjectedSpan=17 TotalChord=1.99219 TotalArea=31.6661
  root: chord 3.0625, twist 0, airfoil file "typical-8"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 ThickChord=0.154545
  sections:
    n  Span     Root_Chord  Tip_Chord  Area     Sweep    Sweep_Location  Dihedral  Twist  Twist_Location  tip airfoil
    1  3.18279  3.0625      1.95312    7.98185  22.0909  0               0         0      0.25            airfoil file "typical-12"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 ThickChord=0.1
    2  5.31721  1.95312     1          7.85119  13.5455  0               0         0      0.25            airfoil file "typical-14"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 ThickChord=0.1

Wing "Horizontal stabilizer", child of "Fuselage"
  location (X Y Z) 14.26 0 3.47826, rotation 0 0 0
  symmetric about XZ
  bounding box size 2.17836 6.8 0.269201
  totals: TotalSpan=6.8 TotalProjectedSpan=6.8 TotalChord=1.15 TotalArea=7.82
  root: chord 1.6, twist 0, NACA 4-series Camber=0 CamberLoc=0.2 ThickChord=0.168182
  sections:
    n  Span  Root_Chord  Tip_Chord  Area  Sweep  Sweep_Location  Dihedral  Twist  Twist_Location  tip airfoil
    1  3.4   1.6         0.7        3.91  23.5   0               0         0      0.25            NACA 4-series Camber=0 CamberLoc=0.2 ThickChord=0.222727

Wing "Vertical stabilizer", child of "Fuselage"
  location (X Y Z) 11.72 0 1, rotation 90 0 0
  bounding box size 5.09847 0.629608 2.82042
  totals: TotalSpan=2.82042 TotalProjectedSpan=2.82042 TotalChord=2.7225 TotalArea=8.04843
  root: chord 3.22, twist 0, NACA 4-series Camber=0 CamberLoc=0.2 ThickChord=0.195455
  sections:
    n  Span     Root_Chord  Tip_Chord  Area     Sweep  Sweep_Location  Dihedral  Twist  Twist_Location  tip airfoil
    1  2.26042  3.22        2.66       6.64563  44.2   0               0         0      0.25            NACA 4-series Camber=0 CamberLoc=0.2 ThickChord=0.1
    2  0.56     2.66        2.35       1.4028   44.5   0               0         0      0.25            NACA 4-series Camber=0 CamberLoc=0.2 ThickChord=0.122727

Fuselage "Wing box", child of "Fuselage"
  location (X Y Z) 3.36957 0 0.3, rotation 0 0 0
  bounding box size 9 2 1.90851
  Design: Length=9
  cross sections:
    n  XLocPercent  YLocPercent  ZLocPercent  shape
    0  0            0            -0.0111111   point
    1  0.25         0            0            general fuselage BotStr=0.83 BotTanAngle=90 CornerRad=0 Height=1.42274 LowStr=0.83 MaxWidthLoc=0 TopStr=0.83 TopTanAngle=90 UpStr=0.83 Width=1.9
    2  0.5          0            0            general fuselage BotStr=1.24773 BotTanAngle=90 CornerRad=0 Height=1.90851 LowStr=0.565636 MaxWidthLoc=-0.436364 TopStr=0.83 TopTanAngle=90 UpStr=0.83 Width=2
    3  0.75         0            0            ellipse Ellipse_Height=1.42364 Ellipse_Width=1.9
    4  1            0            0.0166667    point

Custom "Duct", child of "Fuselage"
  location (X Y Z) 11.95 -1.47 1.08, rotation 0 0 0
  symmetric about XZ
  bounding box size 2.55 4.04267 1.04652
  Design: Camber=0 CamberLoc=0.0416667 Chord=2.55 Height=0.65 InvertFlag=0 Shape=0 ThickChord=0.15 Width=0.72
  custom script Duct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

Wing "spine", child of "Fuselage"
  location (X Y Z) 12.3913 0 1.41304, rotation -90 0 -180; relative location 12.3913 0 1.41304, rotation 90 180 0
  bounding box size 3.26657 0.292368 0.6
  totals: TotalSpan=0.6 TotalProjectedSpan=0.6 TotalChord=1.7526 TotalArea=1.10729
  root: chord 2.11458, twist 0, NACA 4-series Camber=0 CamberLoc=0.2 ThickChord=0.0863636
  sections:
    n  Span  Root_Chord  Tip_Chord  Area      Sweep     Sweep_Location  Dihedral  Twist  Twist_Location  tip airfoil
    1  0.4   2.11458     1.94792    0.8125    -36.4091  0               0         0      0.25            NACA 4-series Camber=0 CamberLoc=0.2 ThickChord=0.15
    2  0.2   1.94792     1          0.294792  -76.8636  0               0         0      0.25            NACA 4-series Camber=0 CamberLoc=0.2 ThickChord=0.1
