OpenVSP model (file version 5), 10 components.
Geometry view with OpenVSP parameter names; values to 6 digits, angles in degrees, lengths in the model's unit.
Overall bounding box: X_Min=0 X_Len=23.243 Y_Min=-7.67766 Y_Len=15.3553 Z_Min=-0.815626 Z_Len=5.05421

Blank "Su-27"
  location (X Y Z) 0 0 0, rotation 0 0 0

Wing "Main Wing", child of "Su-27"
  location (X Y Z) 9.44293 0 0.55, rotation 0 0 0
  symmetric about XZ
  bounding box size 8.75824 15 0.402658
  totals: TotalSpan=15 TotalProjectedSpan=15 TotalChord=4.35677 TotalArea=65.3516 TotalAR=3.44292
  root: chord 6.70833, twist 0, NACA 4-series Camber=0 CamberLoc=0.2 ThickChord=0.06
  sections:
    n  Span  Root_Chord  Tip_Chord  Area     Sweep  Sweep_Location  Dihedral  Twist  Twist_Location  tip airfoil
    1  7.5   6.70833     2.00521    32.6758  42     0               0         0      0.25            as above

Wing "H-Stab", child of "Main Wing"
  location (X Y Z) 16.7799 1.8 0.55, rotation 0 0 0; relative location 7.33696 1.8 0, rotation 0 0 0
  symmetric about XZ
  bounding box size 4.68298 9.90209 0.240094
  totals: TotalSpan=6.30209 TotalProjectedSpan=6.30209 TotalChord=2.51389 TotalArea=15.8803 TotalAR=2.50098
  root: chord 4, twist 0, NACA 4-series Camber=0 CamberLoc=0.2 ThickChord=0.06
  sections:
    n  Span      Root_Chord  Tip_Chord  Area      Sweep    Sweep_Location  Dihedral  Twist  Twist_Location  tip airfoil
    1  0.395834  4           3.66667    1.51736   59.8864  0               0         0      0.25            as above
    2  2.125     3.66667     1.8        5.80834   46       0               0         0      0.25            as above
    3  0.630209  1.8         0.15       0.614454  46       0               0         0      0.25            as above

Wing "LEX", child of "Main Wing"
  location (X Y Z) 1.94293 0 0.45, rotation 0 0 0; relative location -7.5 0 -0.1, rotation 0 0 0
  symmetric about XZ
  bounding box size 18.5001 4.6 0.469782
  totals: TotalSpan=4.6 TotalProjectedSpan=4.6 TotalChord=13.2844 TotalArea=61.1081 TotalAR=0.346272
  root: chord 18.5, twist 0, NACA 4-series Camber=0.02 CamberLoc=0.3 ThickChord=0.01
  sections:
    n  Span  Root_Chord  Tip_Chord  Area    Sweep   Sweep_Location  Dihedral  Twist  Twist_Location  tip airfoil
    1  2.3   18.5        8.06872    30.554  77.225  0               0         0      0.25            as above

Stack "Wing Tip Pylon", child of "Main Wing"
  location (X Y Z) 14.7499 7.5 0.55, rotation 0 0 0; relative location 5.307 7.5 0, rotation 0 0 0
  symmetric about XZ
  bounding box size 3.5 15.3553 0.355317
  cross sections:
    n  XDelta  YDelta  ZDelta  shape
    0  0       0       0       point
    1  1       0       0       rounded rectangle RoundRectXSec_Radius=0.0238636 RoundedRect_Height=0.2 RoundedRect_Width=0.2
    2  2       0       0       as above
    3  0.5     0       0       point

Wing "V-Stab", child of "Main Wing"
  location (X Y Z) 14.9457 2 0.226087, rotation 90 0 0; relative location 5.50272 2 -0.323913, rotation 90 0 0
  symmetric about XZ
  bounding box size 4.48956 4.25501 4.12142
  totals: TotalSpan=8.025 TotalProjectedSpan=8.025 TotalChord=1.68594 TotalArea=20.3046 TotalAR=3.17172
  root: chord 4.2, twist 0, NACA 4-series Camber=0 CamberLoc=0.2 ThickChord=0.06
  sections:
    n  Span      Root_Chord  Tip_Chord  Area      Sweep  Sweep_Location  Dihedral  Twist  Twist_Location  tip airfoil
    1  3.7       4.2         1.17188    9.93797   41.85  0               0         0      0.25            as above
    2  0.312501  1.17188     0.2        0.214356  41.85  0               0         0      0.25            as above

Wing "V-Stab2", child of "Main Wing"
  location (X Y Z) 16.6929 2 0.275, rotation -90 0 0; relative location 7.25 2 -0.275, rotation -90 0 0
  symmetric about XZ
  bounding box size 2.1875 4.25169 1.09063
  totals: TotalSpan=2.18125 TotalProjectedSpan=2.18125 TotalChord=1.30599 TotalArea=3.54471 TotalAR=1.34224
  root: chord 2.1875, twist 0, NACA 4-series Camber=0 CamberLoc=0.2 ThickChord=0.115
  sections:
    n  Span      Root_Chord  Tip_Chord  Area      Sweep  Sweep_Location  Dihedral  Twist  Twist_Location  tip airfoil
    1  0.890626  2.1875      1.43229    1.61194   40     0               0         0      0.25            NACA 4-series Camber=0 CamberLoc=0.2 ThickChord=0.1
    2  0.2       1.43229     0.171875   0.160417  40     0               0         0      0.25            as above

Stack "Fuselage", child of "Su-27"
  location (X Y Z) 0 0 0, rotation 0 0 0
  bounding box size 23.243 2 2.28919
  cross sections:
    n  XDelta    YDelta  YRotate  ZDelta     shape
    0  0         0       0        0          point
    1  0.8       0       -5       0.085      circle Circle_Diameter=0.15
    2  2.7459    0       0        0.163934   circle Circle_Diameter=1.2
    3  2.22951   0       2        0          ellipse Ellipse_Height=1.4 Ellipse_Width=1.4
    4  3.78689   0       5        0          as above
    5  3.78689   0       0        -0.327869  ellipse Ellipse_Height=1.4 Ellipse_Width=1.6
    6  4         0       0        -0.25      ellipse Ellipse_Height=1.3 Ellipse_Width=2
    7  4         0       -2       0.25       ellipse Ellipse_Height=0.7 Ellipse_Width=1.4
    8  0.467213  0       0        0          circle Circle_Diameter=0.6
    9  1.48361   0       0        0          point

Stack "Canopy", child of "Fuselage"
  location (X Y Z) 3.25 0 0.75, rotation 0 -5 0
  bounding box size 6.4266 1.00846 1.90969
  cross sections:
    n  XDelta    YDelta  YRotate  ZDelta     shape
    0  0         0       0        0          point
    1  2.72131   0       0        0.409836   ellipse Ellipse_Height=1.5 Ellipse_Width=1
    2  2         0       5        -0.15      ellipse Ellipse_Height=1 Ellipse_Width=1
    3  1         0       0        -0.163934  ellipse Ellipse_Height=0.7 Ellipse_Width=0.65
    4  0.745902  0       0        0          point

Stack "Intakes", child of "Fuselage"
  location (X Y Z) 9.7 1.19565 0.5, rotation 0 0 0.5
  symmetric about XZ
  bounding box size 11.4276 3.80128 1.53037
  cross sections:
    n  XDelta   YDelta  ZDelta      shape
    0  0        0       0           ellipse Ellipse_Height=0.05 Ellipse_Width=0.6
    1  1.25     0       -0.327869   rounded rectangle RoundRectXSec_Radius=0.2 RoundedRect_Height=1.02273 RoundedRect_Width=1.05
    2  0.25     0       -0.15       rounded rectangle RoundRectXSec_Radius=0.2 RoundedRect_Height=1.35 RoundedRect_Width=1.1
    3  3.72131  0       -0.0819672  rounded rectangle RoundRectXSec_Radius=0.2 RoundedRect_Height=1.40289 RoundedRect_Width=1.2
    4  1        0       0           circle Circle_Diameter=1.25
    5  3.95082  0       0.1         circle Circle_Diameter=1.20145
    6  1.25     0       0.00196721  circle Circle_Diameter=0.75
